<?xml version="1.0"?>
<!-- Generated by Aero-Matic v 0.8

     Inputs:
                horsepower: 2550
                     pitch: variable
            max engine rpm: 27700
        prop diameter (ft): 12

     Outputs:
              max prop rpm:1563.58
                gear ratio:  17.72
                       Cp0:0.133929
                       Ct0:0.115179
       static thrust (lbs):3857.01
-->

<propeller name="dowty-rotol">
  <ixx>1 </ixx>
  <diameter unit="IN">144.0 </diameter>
  <numblades> 6 </numblades>
  <gearratio>1.772 </gearratio>
<!--  <gearratio>3 </gearratio> -->
  <minpitch> 70 </minpitch>
  <maxpitch> 85 </maxpitch>
  <minrpm>   750 </minrpm>
  <maxrpm>   1200 </maxrpm>

  <table name="C_THRUST" type="internal">
      <tableData>
                12         30
       0.0      0.1152   0.1552
       0.1      0.1056   0.1552
       0.2      0.0959   0.1552
       0.3      0.0797   0.1544
       0.4      0.0606   0.1536
       0.5      0.0413   0.1516
       0.6      0.0177   0.1435
       0.7      -0.0015   0.1291
       0.8      -0.0340   0.1145
       1.0      -0.0738   0.0762
       1.2      -0.1209   0.0407
       1.4      -0.1654   0.0029
       1.6      -0.2165   -0.0334
       1.8      -0.2649   -0.0695
       2.0      -0.3110   -0.1074
       2.2      -0.3571   -0.1459
       2.4      -0.4031   -0.1847
      </tableData>
  </table>

  <table name="C_POWER" type="internal">
     <tableData>
                12         30
       0.0      0.1339   0.1939
       0.1      0.1339   0.1939
       0.2      0.1276   0.1939
       0.3      0.1213   0.1939
       0.4      0.1067   0.1939
       0.5      0.0879   0.1918
       0.6      0.0711   0.1897
       0.7      0.0419   0.1854
       0.8      0.0167   0.1767
       1.0      -0.0502   0.1443
       1.2      -0.1464   0.0970
       1.4      -0.2719   0.0485
       1.6      -0.4018   -0.0043
       1.8      -0.5357   -0.1183
       2.0      -0.6696   -0.2366
       2.2      -0.8036   -0.3549
       2.4      -0.9375   -0.4732
     </tableData>
  </table>

</propeller>
