<FDM_CONFIG NAME="fokker50" VERSION="1.65" RELEASE="ALPHA">
<!--
  File:     fokker50.xml
  Author:   Aero-Matic v 0.7

  Inputs:
    name:          fokker50
    type:          multi-engine prop transport
    max weight:    43989.75 lb
    wing span:     95.149 ft
    length:        82.84525 ft
    wing area:     753.55 sq-ft
    gear type:     tricycle
    retractable?:  yes
    # engines:     2
    engine type:   turboprop
    engine layout: wings
    yaw damper?    yes
  Outputs:
    wing loading:  58.38 lb/sq-ft
    CL-alpha:      4.9 per radian
    CL-0:          0.24
    CL-max:        1.4
    CD-0:          0.025
    K:             0.039

-->

 <METRICS>
   AC_WINGAREA  753.55
   AC_WINGSPAN  95.15
   AC_CHORD      7.92
   AC_HTAILAREA 120.57
   AC_HTAILARM  41.42
   AC_VTAILAREA 135.64
   AC_LV        41.42
   AC_IXX       474936
   AC_IYY       430723
   AC_IZZ       896344
   AC_IXZ       0
   AC_EMPTYWT   26394
   AC_CGLOC     497.1  0.0 -24.9
   AC_AERORP    497.1  0.0  0.0
   AC_EYEPTLOC  79.5 -24.0 65.0
   AC_VRP       497.1  0.0 -24.9
 </METRICS>
 <UNDERCARRIAGE>
  AC_GEAR NOSE_LG   129.2  0.0 -119.3 13196.9 4399.0  0.5  0.8  0.02 STEERABLE NONE  5.0 RETRACT
  AC_GEAR LEFT_MLG  521.9 -125.6 -119.3 43989.8 8798.0  0.5  0.8  0.02 FIXED LEFT  0 RETRACT
  AC_GEAR RIGHT_MLG 521.9 125.6 -119.3 43989.8 8798.0  0.5  0.8  0.02 FIXED RIGHT 0 RETRACT
  AC_GEAR RWT       497.1 47.575 -24.9 10000 2000 0.2 0.2 0.2 FIXED NONE 0 FIXED
  AC_GEAR LWT       497.1 -47.575 -24.9 10000 2000 0.2 0.2 0.2 FIXED NONE 0 FIXED
  AC_GEAR NOSE      994.143 0.0 -24.9 10000 2000 0.2 0.2 0.2 FIXED NONE 0 FIXED
  AC_GEAR BELLY     497.1  0.0 -49.8 10000 2000 0.2 0.2 0.2 FIXED NONE 0 FIXED
  AC_GEAR VTT       0.0 0.0 303.1 10000 2000 0.2 0.2 0.2 FIXED NONE 0 FIXED
 </UNDERCARRIAGE>
 <PROPULSION>
  <AC_ENGINE FILE="PW125B">
    XLOC 497.0715
    YLOC -190.298
    ZLOC -40
    PITCH 0
    YAW 0
    FEED 0
    <AC_THRUSTER FILE="direct">
      XLOC 497.0715
      YLOC -190.298
      ZLOC -40
      PITCH 0
      YAW 0
    </AC_THRUSTER>
  </AC_ENGINE>
  <AC_ENGINE FILE="PW125B">
    XLOC 497.0715
    YLOC 190.298
    ZLOC -40
    PITCH 0
    YAW 0
    FEED 1
    <AC_THRUSTER FILE="direct">
      XLOC 497.0715
      YLOC 190.298
      ZLOC -40
      PITCH 0
      YAW 0
    </AC_THRUSTER>
  </AC_ENGINE>
  <AC_TANK TYPE="FUEL" NUMBER="0">
    XLOC 497.0715
    YLOC 0
    ZLOC -24.853575
    RADIUS 1
    CAPACITY   814.6
    CONTENTS   407.3
  </AC_TANK>
  <AC_TANK TYPE="FUEL" NUMBER="1">
    XLOC 497.0715
    YLOC 0
    ZLOC -24.853575
    RADIUS 1
    CAPACITY   814.6
    CONTENTS   407.3
  </AC_TANK>
  <AC_TANK TYPE="FUEL" NUMBER="2">
    XLOC 497.0715
    YLOC 0
    ZLOC -24.853575
    RADIUS 1
    CAPACITY   814.6
    CONTENTS   407.3
  </AC_TANK>
 </PROPULSION>
 <FLIGHT_CONTROL NAME="fokker50">
   <COMPONENT NAME="Pitch Trim Sum" TYPE="SUMMER">
      INPUT   fcs/elevator-cmd-norm
      INPUT   fcs/pitch-trim-cmd-norm
      CLIPTO  -1 1
   </COMPONENT>
   <COMPONENT NAME="Elevator Control" TYPE="AEROSURFACE_SCALE">
      INPUT   fcs/pitch-trim-sum
      MIN     -0.350
      MAX      0.300
      OUTPUT  fcs/elevator-pos-rad
   </COMPONENT>
   <COMPONENT NAME="Roll Trim Sum" TYPE="SUMMER">
      INPUT   fcs/aileron-cmd-norm
      INPUT   fcs/roll-trim-cmd-norm
      CLIPTO  -1 1
   </COMPONENT>
   <COMPONENT NAME="Left Aileron Control" TYPE="AEROSURFACE_SCALE">
      INPUT   fcs/roll-trim-sum
      MIN    -0.35
      MAX     0.35
      OUTPUT  fcs/left-aileron-pos-rad
   </COMPONENT>
   <COMPONENT NAME="Right Aileron Control" TYPE="AEROSURFACE_SCALE">
      INPUT  -fcs/roll-trim-sum
      MIN    -0.35
      MAX     0.35
      OUTPUT  fcs/right-aileron-pos-rad
   </COMPONENT>
   <COMPONENT NAME="Rudder Command Sum" TYPE="SUMMER">
      INPUT   fcs/rudder-cmd-norm
      INPUT   fcs/yaw-trim-cmd-norm
      CLIPTO  -1 1
   </COMPONENT>
   <COMPONENT NAME="Yaw Damper Rate" TYPE="SCHEDULED_GAIN">
      INPUT        velocities/r-aero-rad_sec
      SCHEDULED_BY aero/qbar-psf
      ROWS         2
       3.00        0.00
      11.00        2.00
   </COMPONENT>
   <COMPONENT NAME="Yaw Damper Beta" TYPE="SCHEDULED_GAIN">
      INPUT        aero/beta-rad
      SCHEDULED_BY aero/qbar-psf
      ROWS         2
       3.00        0.00
      11.00        0.00
   </COMPONENT>
   <COMPONENT NAME="Yaw Damper Sum" TYPE="SUMMER">
      INPUT        fcs/yaw-damper-beta
      INPUT        fcs/yaw-damper-rate
      CLIPTO      -0.2 0.2
   </COMPONENT>
   <COMPONENT NAME="Yaw Damper Final" TYPE="SCHEDULED_GAIN">
      INPUT        fcs/yaw-damper-sum
      SCHEDULED_BY aero/qbar-psf
      ROWS         2
      2.99         0.0
      3.00         1.0
   </COMPONENT>
   <COMPONENT NAME="Rudder Sum" TYPE="SUMMER">
      INPUT   fcs/rudder-command-sum
      INPUT   fcs/yaw-damper-final
      CLIPTO  -1 1
   </COMPONENT>
   <COMPONENT NAME="Rudder Control" TYPE="AEROSURFACE_SCALE">
      INPUT   fcs/rudder-sum
      MIN     -0.35
      MAX      0.35
      OUTPUT  fcs/rudder-pos-rad
   </COMPONENT>
   <COMPONENT NAME="Flaps Control" TYPE="KINEMAT">
     INPUT   fcs/flap-cmd-norm
     DETENTS 4
             0   0
             10  2
             25  2
             35  3
     OUTPUT  fcs/flap-pos-deg
   </COMPONENT>
   <COMPONENT NAME="Gear Control" TYPE="KINEMAT">
     INPUT   gear/gear-cmd-norm
     DETENTS 2
             0   0
             1   5
     OUTPUT  gear/gear-pos-norm
   </COMPONENT>
   <COMPONENT NAME="Speedbrake Control" TYPE="KINEMAT">
     INPUT   fcs/speedbrake-cmd-norm
     DETENTS 2
             0   0
             1   1
     OUTPUT  fcs/speedbrake-pos-norm
   </COMPONENT>
 </FLIGHT_CONTROL>
 <AERODYNAMICS>
  <AXIS NAME="LIFT">
    <GROUP NAME="CLb">
      Basic_lift
      <FACTOR NAME="kCLge" TYPE="VECTOR">
         Change_in_lift_due_to_ground_effect
         13
         aero/h_b-mac-ft
         none
         0.0   1.328
         0.1   1.232
         0.15  1.187
         0.2   1.164
         0.3   1.125
         0.4   1.124
         0.5   1.076
         0.6   1.060
         0.7   1.045
         0.8   1.035
         0.9   1.021
         1.0   1.011
         1.1   1.000
      </FACTOR>
      <COEFFICIENT NAME="CLalpha" TYPE="VECTOR">
        Lift_due_to_alpha
        4
        aero/alpha-rad
        aero/qbar-psf|metrics/Sw-sqft
        -0.20   -0.740
         0.00    0.240
         0.24    1.700
         0.60    0.704
      </COEFFICIENT>
      <COEFFICIENT NAME="dCLflap" TYPE="VALUE">
         Delta_Lift_due_to_flaps
         aero/qbar-psf|metrics/Sw-sqft|fcs/components/flaps-control/output-norm
         0.9
      </COEFFICIENT>
    </GROUP>
    <COEFFICIENT NAME="dCLsb" TYPE="VALUE">
       Delta_Lift_due_to_speedbrake
       aero/qbar-psf|metrics/Sw-sqft|fcs/speedbrake-pos-norm
       0
    </COEFFICIENT>
    <COEFFICIENT NAME="CLde" TYPE="VALUE">
       Lift_due_to_Elevator_Deflection
       aero/qbar-psf|metrics/Sw-sqft|fcs/elevator-pos-rad
       0.2
    </COEFFICIENT>
  </AXIS>
  <AXIS NAME="DRAG">
    <COEFFICIENT NAME="CD0" TYPE="VECTOR">
       Drag_at_zero_lift
       5
       aero/alpha-rad
       aero/qbar-psf|metrics/Sw-sqft
       -1.57       1.500
       -0.26       0.050
        0.00       0.025
        0.26       0.050
        1.57       1.500
    </COEFFICIENT>
    <GROUP NAME="CDb">
      Basic_drag
      <FACTOR NAME="kCDge" TYPE="VECTOR">
         Change_in_drag_due_to_ground_effect
         13
         aero/h_b-mac-ft
         none
         0.0   0.048
         0.1   0.515
         0.15  0.629
         0.2   0.709
         0.3   0.815
         0.4   0.882
         0.5   0.928
         0.6   0.962
         0.7   0.988
         0.8   1.0
         0.9   1.0
         1.0   1.0
         1.1   1.0
      </FACTOR>
      <COEFFICIENT NAME="CDi" TYPE="VALUE">
         Induced_drag
         aero/qbar-psf|metrics/Sw-sqft|aero/cl-squared-norm
         0.039
      </COEFFICIENT>
      <COEFFICIENT NAME="CDmach" TYPE="VECTOR">
         Drag_due_to_mach
         4
         velocities/mach-norm
         aero/qbar-psf|metrics/Sw-sqft
         0.0       0.000
         0.7      0.000
         1.1       0.023
         1.8       0.015
      </COEFFICIENT>
      <COEFFICIENT NAME="CDflap" TYPE="VALUE">
         Drag_due_to_flaps
         aero/qbar-psf|metrics/Sw-sqft|fcs/components/flaps-control/output-norm
         0.035
      </COEFFICIENT>
    </GROUP>
    <COEFFICIENT NAME="CDgear" TYPE="VALUE">
       Drag_due_to_gear
       aero/qbar-psf|metrics/Sw-sqft|gear/gear-pos-norm
       0.023
    </COEFFICIENT>
    <COEFFICIENT NAME="CDsb" TYPE="VALUE">
       Drag_due_to_speedbrakes
       aero/qbar-psf|metrics/Sw-sqft|fcs/speedbrake-pos-norm
       0.025
    </COEFFICIENT>
    <COEFFICIENT NAME="CDbeta" TYPE="VECTOR">
       Drag_due_to_sideslip
       5
       aero/beta-rad
       aero/qbar-psf|metrics/Sw-sqft
       -1.57       1.230
       -0.26       0.050
        0.00       0.00
        0.26       0.050
        1.57       1.230
    </COEFFICIENT>
    <COEFFICIENT NAME="CDde" TYPE="VALUE">
       Drag_due_to_Elevator_Deflection
       aero/qbar-psf|metrics/Sw-sqft|fcs/elevator-pos-norm
       0.035
    </COEFFICIENT>
  </AXIS>
  <AXIS NAME="SIDE">
    <COEFFICIENT NAME="CYb" TYPE="VALUE">
       Side_force_due_to_beta
       aero/qbar-psf|metrics/Sw-sqft|aero/beta-rad
       -1
    </COEFFICIENT>
  </AXIS>
  <AXIS NAME="ROLL">
    <COEFFICIENT NAME="Clb" TYPE="VALUE">
       Roll_moment_due_to_beta
       aero/qbar-psf|metrics/Sw-sqft|metrics/bw-ft|aero/beta-rad
       -0.1
    </COEFFICIENT>
    <COEFFICIENT NAME="Clp" TYPE="VALUE">
       Roll_moment_due_to_roll_rate
       aero/qbar-psf|metrics/Sw-sqft|metrics/bw-ft|aero/bi2vel|velocities/p-aero-rad_sec
       -0.4
    </COEFFICIENT>
    <COEFFICIENT NAME="Clr" TYPE="VALUE">
       Roll_moment_due_to_yaw_rate
       aero/qbar-psf|metrics/Sw-sqft|metrics/bw-ft|aero/bi2vel|velocities/r-aero-rad_sec
       0.15
    </COEFFICIENT>
    <COEFFICIENT NAME="Clda" TYPE="VECTOR">
       Roll_moment_due_to_aileron
       2
       velocities/mach-norm
       aero/qbar-psf|metrics/Sw-sqft|metrics/bw-ft|fcs/left-aileron-pos-rad
       0.0       0.15
       2.0       0.050
    </COEFFICIENT>
    <COEFFICIENT NAME="Cldr" TYPE="VALUE">
       Roll_moment_due_to_rudder
       aero/qbar-psf|metrics/Sw-sqft|metrics/bw-ft|fcs/rudder-pos-rad
       0.01
    </COEFFICIENT>
  </AXIS>
  <AXIS NAME="PITCH">
    <COEFFICIENT NAME="Cmalpha" TYPE="VALUE">
       Pitch_moment_due_to_alpha
       aero/qbar-psf|metrics/Sw-sqft|metrics/cbarw-ft|aero/alpha-rad
       -0.4
    </COEFFICIENT>
    <COEFFICIENT NAME="Cmde" TYPE="VECTOR">
       Pitch_moment_due_to_elevator
       2
       velocities/mach-norm
       aero/qbar-psf|metrics/Sw-sqft|metrics/cbarw-ft|fcs/elevator-pos-rad
       0.0       -1
       2.0       -0.250
    </COEFFICIENT>
    <COEFFICIENT NAME="Cmq" TYPE="VALUE">
       Pitch_moment_due_to_pitch_rate
       aero/qbar-psf|metrics/Sw-sqft|metrics/cbarw-ft|aero/ci2vel|velocities/q-aero-rad_sec
       -22
    </COEFFICIENT>
    <COEFFICIENT NAME="Cmadot" TYPE="VALUE">
       Pitch_moment_due_to_alpha_rate
       aero/qbar-psf|metrics/Sw-sqft|metrics/cbarw-ft|aero/ci2vel|aero/alphadot-rad_sec
       -8
    </COEFFICIENT>
  </AXIS>
  <AXIS NAME="YAW">
    <COEFFICIENT NAME="Cnb" TYPE="VALUE">
       Yaw_moment_due_to_beta
       aero/qbar-psf|metrics/Sw-sqft|metrics/bw-ft|aero/beta-rad
       0.12
    </COEFFICIENT>
    <COEFFICIENT NAME="Cnr" TYPE="VALUE">
       Yaw_moment_due_to_yaw_rate
       aero/qbar-psf|metrics/Sw-sqft|metrics/bw-ft|aero/bi2vel|velocities/r-aero-rad_sec
       -0.15
    </COEFFICIENT>
    <COEFFICIENT NAME="Cndr" TYPE="VALUE">
       Yaw_moment_due_to_rudder
       aero/qbar-psf|metrics/Sw-sqft|metrics/bw-ft|fcs/rudder-pos-rad
       -0.1
    </COEFFICIENT>
    <COEFFICIENT NAME="Cnda" TYPE="VALUE">
       Adverse_yaw
       aero/qbar-psf|metrics/Sw-sqft|metrics/bw-ft|fcs/left-aileron-pos-rad
       -0.008
    </COEFFICIENT>
  </AXIS>
 </AERODYNAMICS>
</FDM_CONFIG>
